// SBML level 2 version 4

function function_2(substrate, Km, V)
  V*substrate/(Km + substrate);
end
function_2 is "Henri-Michaelis-Menten (irreversible)_2";

function activated_Transcription_1(k1, k2, Modifier, k3, Modifier2, Modifier3, k4)
  k1 + k2*Modifier + k3*Modifier2 + k4*Modifier3;
end
activated_Transcription_1 is "activated Transcription [1]";

function Catalytic_activation_irrev__2(substrate, Activator, Kms, V, Ka)
  V*substrate*Activator/((Kms + substrate)*(Ka + Activator));
end
Catalytic_activation_irrev__2 is "Catalytic activation (irrev)_2";

model Model_1()
  // NFkappaB signalling in primary hepatocytes

  // Compartments:
  compartment default = 4; default is "cytoplasm";
  compartment nucleus = 1;

  // Species:
  species pp65_Ser536_default in default = 0.001744655;
  species IkBa_p in default = 0.006894991;
  species IKKb in default = 0.8928154;
  species IKKb_p in default = 0.007781241;
  species TNFa in default = TNFa_amount;
  species p65_IkB_default in default = 0.08032148; p65_IkB_default is "p65-IkB";
  species IkBa_mRNA_default in default = 3.549091;
  species IkBa_default in default = 0.02399679;
  species $p65_mRNA in default = 1;
  species nosignal in default = 1;
  species signal1 in default = 3.201923e-33;
  species signal2 in default = 0;
  species pp65_Ser276_default in default = 1;
  species pp65_Ser536_nucleus in nucleus = 0.007575205;
  species IkBa_nucleus in nucleus = 0.001936034;
  species p65_IkB_nucleus in nucleus = 0.05298583; p65_IkB_nucleus is "p65-IkB";
  species IkBa_mRNA_nucleus in nucleus = 3.710989;
  species IkBa_mRNA_1 in nucleus = 14.09099;
  species p65 in nucleus = 0.01755089;
  species pp65_Ser276_nucleus in nucleus = 4.085677e-25;
  species IkBa_mRNA_2 in nucleus = 14.09099;
  species active_nuclear_kinase in nucleus = 4.279919e-30;
  species unactive_nuclear_kinase in nucleus = 1;

  // Parameters:
  IkBa_phosphorylation_kcat = 12.88739;
  var V_IKK_IkBa;
  k_IkBa = 157.451;
  k_IkBa_p = 1178.532;
  k_pp65 = 1719.654;
  var unscaled_IkBa;
  var unscaled_pIkBa;
  var unscaled_pp65;
  complex_association_k1 = 7.560978;
  IkBa_phosphorylation_kM = 218.5635;
  IkBa_nuclear_shuttle_k1 = 1.236146;
  IkBa_nuclear_shuttle_k2 = 15.2897;
  var unscaled_IkBa_mRNA;
  complex_association_k2 = 0.003673612;
  IkBa_transcription_kbasal = 0.002042046;
  k_IkBa_mRNA = 0.05595792;
  TNFa_amount = 10;
  p65_degradation_k = 2.029112e-6;
  IkBa_deg_complex_cyt_k = 1.783873e-7;
  var scaled_pp65;
  var scaled_IkBa;
  var scaled_pIkBa;
  IkBa_translation_k = 1.348839e-5;
  p65_translation_k = 2.061458e-7;
  parameter_25 = 1.793841; parameter_25 is "IkBa_transcription_kA_pp65_Ser536";
  IkBa_mRNA_transport_k = 0.006693271;
  IkBa_mRNA_deg_cyt_k = 0.001749649;
  IkBa_mRNA_deg_nuc_k = 0.001060577;
  var scaled_IkBa_mRNA;
  IkBa_deg_cyt_k = 1.59715e-7;
  IKKb_active_phosphorylation_vmax = 1.151667;
  IkBa_deg_nuc_k = 6.970444e-6;
  IkBa_deg_complex_nuc_k = 2.999367e-5;
  complex_nuclear_shuttle_k1 = 0.001261496;
  IKKb_active_phosphorylation_kA = 91153.5;
  IKKb_active_phosphorylation_kM = 0.007239565;
  IKKb_basal_phosphoylation_k = 2.681832e-6;
  IKKb_dephopshorylation_k = 0.000307712;
  p65_nuclear_shuttle_k1 = 0.0359883;
  TNFa_degradation_k = 0.001720715;
  IkBa_complex_phosphorylation_kM = 0.6248424;
  parameter_42 = 48.07284; parameter_42 is "IkBa_complex_phosphorylation_kcat";
  var t_IkBa_complex_deg_cyt;
  var t_IkBa_complex_deg_nuc;
  var t_IkBa_deg_cyt;
  var t_IkBa_deg_nuc;
  var t_IkBa_translation;
  turnover_IkBa = 1;
  var t_p65_deg;
  var t_p65_translation;
  turnover_p65 = 1;
  IkBa_transcription_kA2_p65 = 0.7488894;
  IkBa_p_active_degradation_k = 0.006939514;
  pp65_dephosphorylation = 0.008224421;
  parameter_55 = 0.0625166; parameter_55 is "IkBa_transcription_kA3_pp65_Ser276";
  parameter_56 = 0.000251458; parameter_56 is "p65_nuclear_kinase_Ser276_phosphorylation_kM";
  var parameter_57; parameter_57 is "p65_nuclear_kinase_Ser276_phosphrylation_vmax";
  parameter_58 = 79.99373; parameter_58 is "p65_nuclear_kinase_Ser276_phosphrylation_kcat";
  parameter_59 = 0.7966473; parameter_59 is "pp65_nuclear_kinase_phosphrylation_kM";
  var parameter_60; parameter_60 is "pp65_nuclear_kinase_phosphrylation_vmax";
  parameter_61 = 6596.526; parameter_61 is "pp65_nuclear_kinase_phosphrylation_kcat";
  parameter_62 = 0.001851915; parameter_62 is "pp65_Ser276_dephosphorylation";
  parameter_63 = 1.853226; parameter_63 is "nuclear_kinase_deactivation";
  nuclear_kinase_activation_kM = 4732.103;
  var nuclear_kinase_activation_vmax;
  nuclear_kinase_activation_kcat = 0.953121;
  parameter_67 = 0.1094237; parameter_67 is "nuclear_kinase_signal_transmission_kM";
  parameter_68 = 0.01179607; parameter_68 is "nuclear_kinase_signal_transmission_2";
  parameter_69 = 0.01194733; parameter_69 is "nuclear_kinase_signal_depletion_k";
  parameter_70 = 0.002261915; parameter_70 is "nuclear_kinase_signal_transmission_vmax";
  parameter_71 = 205.1044; parameter_71 is "nuclear_kinase_signal_transmission_kA";
  complex_nuclear_shuttle_k2 = 5.840675e-5;
  p65_nuclear_shuttle_k2 = 6.317644e-5;
  IkBa_min_time = 0;
  IkBa_min_value = 0;
  pIkBa_max_time = 0;
  pIkBa_max_value = 0;
  IkBa_integral = 0;
  pIkBa_integral = 0;
  pp65_max_time = 0;
  pp65_max_value = 0;
  pp65_max_integral = 0;
  IkBa_mRNA_max_time = 0;
  IkBa_mRNA_max_value = 0;
  IkBa_mRNA_integral = 0;
  var V_IKK_complex;
  x = ;
  y = ;

  // Assignment rules:
  V_IKK_IkBa := IkBa_phosphorylation_kcat*IKKb_p;
  unscaled_IkBa := (IkBa_nucleus + p65_IkB_nucleus)*nucleus + (IkBa_p + p65_IkB_default + IkBa_default)*default;
  unscaled_pIkBa := IkBa_p*default;
  unscaled_pp65 := nucleus*pp65_Ser536_nucleus + default*pp65_Ser536_default;
  V_IKK_complex := parameter_42*IKKb_p;
  unscaled_IkBa_mRNA := IkBa_mRNA_default*default;
  scaled_pp65 := k_pp65*unscaled_pp65;
  scaled_IkBa := k_IkBa*unscaled_IkBa;
  scaled_pIkBa := k_IkBa_p*unscaled_pIkBa;
  scaled_IkBa_mRNA := k_IkBa_mRNA*unscaled_IkBa_mRNA;
  t_IkBa_complex_deg_cyt := turnover_IkBa*IkBa_deg_complex_cyt_k;
  t_IkBa_complex_deg_nuc := turnover_IkBa*IkBa_mRNA_deg_nuc_k;
  t_IkBa_deg_cyt := turnover_IkBa*IkBa_deg_cyt_k;
  t_IkBa_deg_nuc := turnover_IkBa*IkBa_deg_nuc_k;
  t_IkBa_translation := turnover_IkBa*IkBa_translation_k;
  t_p65_deg := turnover_p65*p65_degradation_k;
  t_p65_translation := turnover_p65*p65_translation_k;
  parameter_57 := parameter_58*active_nuclear_kinase;
  parameter_60 := parameter_61*active_nuclear_kinase;
  nuclear_kinase_activation_vmax := nuclear_kinase_activation_kcat*signal2;

  // Reactions:
  p65_nuclear_shuttle: pp65_Ser536_default -> pp65_Ser536_nucleus; p65_nuclear_shuttle_k1*pp65_Ser536_default - p65_nuclear_shuttle_k2*pp65_Ser536_nucleus;
  IkBa_transcription_initiation: => IkBa_mRNA_1; nucleus*activated_Transcription_1(IkBa_transcription_kbasal, parameter_25, pp65_Ser536_nucleus, IkBa_transcription_kA2_p65, p65, pp65_Ser276_nucleus, parameter_55);  // modifiers: pp65_Ser536_nucleus, p65, pp65_Ser276_nucleus
  IkBa_p_active_degradation: IkBa_p => ; default*IkBa_p_active_degradation_k*IkBa_p;
  complex_phosphorylation: p65_IkB_default => pp65_Ser536_default + IkBa_p; default*function_2(p65_IkB_default, IkBa_phosphorylation_kM, V_IKK_complex);
  dephosphorylation_IKK: IKKb_p => IKKb; default*IKKb_dephopshorylation_k*IKKb_p;
  Complex_association_n: p65 + IkBa_nucleus -> p65_IkB_nucleus; nucleus*(complex_association_k1*p65*IkBa_nucleus - complex_association_k2*p65_IkB_nucleus);
  IkBa_degradation1: IkBa_nucleus => ; nucleus*t_IkBa_deg_nuc*IkBa_nucleus;
  TNFa_degradation: TNFa => ; default*TNFa_degradation_k*TNFa;
  IkBa_translation: IkBa_mRNA_default => IkBa_mRNA_default + IkBa_default; default*t_IkBa_translation*IkBa_mRNA_default;
  IkBa_nuclear_shuttle: IkBa_default -> IkBa_nucleus; IkBa_nuclear_shuttle_k1*IkBa_default - IkBa_nuclear_shuttle_k2*IkBa_nucleus;
  IkBa_mRNA_degradation1: IkBa_mRNA_default => ; default*IkBa_mRNA_deg_cyt_k*IkBa_mRNA_default;
  IkBa_degradation2: IkBa_default => ; default*t_IkBa_deg_cyt*IkBa_default;
  IkBa_phosphorylation: IkBa_default => IkBa_p; default*function_2(IkBa_default, IkBa_phosphorylation_kM, V_IKK_IkBa);
  Complex_nuclear_shuttle: p65_IkB_nucleus -> p65_IkB_default; complex_nuclear_shuttle_k1*p65_IkB_nucleus - complex_nuclear_shuttle_k2*p65_IkB_default;
  IkBa_mRNA_degradation2: IkBa_mRNA_nucleus => ; nucleus*IkBa_mRNA_deg_nuc_k*IkBa_mRNA_nucleus;
  IkBa_mRNA_transport: IkBa_mRNA_nucleus => IkBa_mRNA_default; IkBa_mRNA_transport_k*IkBa_mRNA_nucleus;
  p65_translation: $p65_mRNA => $p65_mRNA + pp65_Ser536_default; default*t_p65_translation*p65_mRNA;
  pp65_Ser536_degradation1: pp65_Ser536_nucleus => ; nucleus*t_p65_deg*pp65_Ser536_nucleus;
  pp65_Ser536_degradation2: pp65_Ser536_default => ; default*t_p65_deg*pp65_Ser536_default;
  Complex_association_c: pp65_Ser536_default + IkBa_default -> p65_IkB_default; default*(complex_association_k1*pp65_Ser536_default*IkBa_default - complex_association_k2*p65_IkB_default);
  Complex_degradation_p65_c: p65_IkB_default => IkBa_default; default*t_p65_deg*p65_IkB_default;
  Complex_degradation_p65_n: p65_IkB_nucleus => IkBa_nucleus; nucleus*t_p65_deg*p65_IkB_nucleus;
  IkBa_transcription_elongation_1: IkBa_mRNA_1 => IkBa_mRNA_2; nucleus*IkBa_transcription_kbasal*IkBa_mRNA_1;
  IkBa_transcription_elongation_2: IkBa_mRNA_2 => IkBa_mRNA_nucleus; nucleus*IkBa_transcription_kbasal*IkBa_mRNA_2;
  IKK_phosphorylation: IKKb => IKKb_p; default*Catalytic_activation_irrev__2(IKKb, TNFa, IKKb_active_phosphorylation_kM, IKKb_active_phosphorylation_vmax, IKKb_active_phosphorylation_kA);  // modifiers: TNFa
  Complex_degrdation_IkBa_n: p65_IkB_nucleus => pp65_Ser536_nucleus; nucleus*t_IkBa_deg_cyt*p65_IkB_nucleus;
  Complex_degradation_IkBa_c: p65_IkB_default => pp65_Ser536_default; default*t_IkBa_complex_deg_cyt*p65_IkB_default;
  basal_IKKb_phosphorylation: IKKb => IKKb_p; default*IKKb_basal_phosphoylation_k*IKKb;
  pp65_Ser536_dephosphorylation: pp65_Ser536_nucleus => p65; nucleus*pp65_dephosphorylation*pp65_Ser536_nucleus;
  p65_degradation: p65 => ; nucleus*t_p65_deg*p65;
  reaction_25: nosignal => signal1; default*Catalytic_activation_irrev__2(nosignal, TNFa, parameter_67, parameter_70, parameter_71); reaction_25 is "nuclear_kinase_signal_transmission_1";  // modifiers: TNFa
  reaction_26: signal1 => signal2; default*parameter_68*signal1; reaction_26 is "nuclear_kinase_signal_transmission_2";
  nuclear_kinase_activation: unactive_nuclear_kinase => active_nuclear_kinase; nucleus*function_2(unactive_nuclear_kinase, nuclear_kinase_activation_kM, nuclear_kinase_activation_vmax);  // modifiers: signal2
  signal_depletion: signal2 => nosignal; default*parameter_69*signal2;
  reaction_29: active_nuclear_kinase => unactive_nuclear_kinase; nucleus*k1*active_nuclear_kinase; reaction_29 is "nuclear_kinase_deactivation";
    k1 = 0.279505;
  reaction_30: pp65_Ser536_nucleus => pp65_Ser276_default; function_2(pp65_Ser536_nucleus, parameter_59, parameter_60); reaction_30 is "pp65_Ser276_phoshporylation_nuclear_kinase";  // modifiers: active_nuclear_kinase
  reaction_31: p65 => pp65_Ser276_nucleus; nucleus*function_2(p65, parameter_56, parameter_57); reaction_31 is "p65_phosphorylation_nuclear_kinase";  // modifiers: active_nuclear_kinase
  pp65_Ser276_degradation: pp65_Ser276_default => ; default*t_p65_deg*pp65_Ser276_default;
  reaction_33: pp65_Ser276_nucleus => p65; nucleus*parameter_62*pp65_Ser276_nucleus; reaction_33 is "pp65_Ser276_dephosphorylation";

  // Unit definitions:
  unit substance = 1e-6 mole;
end
