// SBML level 3 version 1

function activated_Transcription__1___1__1(IkBa_transcription_kA, IkBa_transcription_k_basal, p65_nucleus)
  IkBa_transcription_k_basal + IkBa_transcription_kA*p65_nucleus;
end
activated_Transcription__1___1__1 is "activated Transcription [1] [1]_1";

function Henri_Michaelis_Menten__irreversible__1(complex_phosphorylation_Vmax, complex_phosphorylation_kM, p65_IkB_cytoplasm)
  complex_phosphorylation_Vmax*p65_IkB_cytoplasm/(complex_phosphorylation_kM + p65_IkB_cytoplasm);
end
Henri_Michaelis_Menten__irreversible__1 is "Henri-Michaelis-Menten (irreversible)_1";

function Henri_Michaelis_Menten__irreversible__2(IkBa_mRNA_cytoplasm, IkBa_translation_Km, IkBa_translation_vmax)
  IkBa_translation_vmax*IkBa_mRNA_cytoplasm/(IkBa_translation_Km + IkBa_mRNA_cytoplasm);
end
Henri_Michaelis_Menten__irreversible__2 is "Henri-Michaelis-Menten (irreversible)_2";

function Henri_Michaelis_Menten__irreversible__3(IkBa_cytoplasm, IkBa_phosphorylation_Vmax, IkBa_phosphorylation_kM)
  IkBa_phosphorylation_Vmax*IkBa_cytoplasm/(IkBa_phosphorylation_kM + IkBa_cytoplasm);
end
Henri_Michaelis_Menten__irreversible__3 is "Henri-Michaelis-Menten (irreversible)_3";

function Catalytic_activation__irrev__1(IKKb, IKKb_active_phosphorylation_Km, IKKb_active_phosphorylation_Vmax, IKKb_active_phosphorylation_kA, TNFa)
  IKKb_active_phosphorylation_Vmax*IKKb*TNFa/((IKKb_active_phosphorylation_Km + IKKb)*(IKKb_active_phosphorylation_kA + TNFa));
end
Catalytic_activation__irrev__1 is "Catalytic activation (irrev)_1";

function Catalytic_activation__irrev_0(substrate, Activator, Kms, V, Ka)
  V*substrate*Activator/((Kms + substrate)*(Ka + Activator));
end
Catalytic_activation__irrev_0 is "Catalytic activation (irrev)";

function Henri_Michaelis_Menten__irreversible_0(substrate, Km, V)
  V*substrate/(Km + substrate);
end
Henri_Michaelis_Menten__irreversible_0 is "Henri-Michaelis-Menten (irreversible)";

model TNFa_Signaling()
  // model units - substance: substance, time: time, volume: volume, area: area, length: length, extent: substance

  // Compartments:
  compartment cytoplasm = 1 volume;
  compartment nucleus = 1 volume;

  // Species:
  species p65_cytoplasm in cytoplasm = 0.001666092;
  species IkBa_p in cytoplasm = 0.2346111;
  species IKKb in cytoplasm = 0.2986685;
  species IKKb_p in cytoplasm = 0.001331514;
  species TNFa in cytoplasm = 0;
  species p65_IkB_cytoplasm in cytoplasm = 0.04112689; p65_IkB_cytoplasm is "p65-IkB";
  species IkBa_mRNA_cytoplasm in cytoplasm = 0.1992023;
  species IkBa_cytoplasm in cytoplasm = 1.951565;
  species IkBa_mRNA_2 in nucleus = 5.141243;
  species p65_nucleus in nucleus = 0.08326765;
  species IkBa_nucleus in nucleus = 3.903128;
  species p65_IkB_nucleus in nucleus = 0.004114729; p65_IkB_nucleus is "p65-IkB";
  species IkBa_mRNA_nucleus in nucleus = 0.000133495;
  species IkBa_mRNA_1 in nucleus = 5.141243;

  // Parameters:
  complex_association_k1 = 8.18761;
  IkBa_phosphorylation_kM = 0.1124603;
  IkBa_shuttle_k1 = 3.712813;
  IkBa_transcription_k_basal = 0.003689776;
  IkBa_translation_vmax = 18.73547;
  IkBa_transcription_kA = 309.2293;
  complex_shuttle_k1 = 0.6521574;
  IKKb_basal_phosphorylation_k1 = 0.1238784;
  IKKb_dephosphorylation_k1 = 27.78683;
  IKKb_active_phosphorylation_kA = 99.99986;
  IKKb_active_phosphorylation_Vmax = 3.654748;
  IKKb_active_phosphorylation_Km = 1.47829;
  IkBa_degradation_k = 0.03601862;
  IkBa_mRNA_degradation_c_k1 = 4.972234;
  IkBa_mRNA_transport_k1 = 35.99848;
  IkBa_p_degradation_k1 = 35.99995;
  p65_shuttle_k1 = 1.800001;
  TNFa_degradation_k1 = 0.9;
  complex_phosphorylation_kM = 3.138203;
  complex_phosphorylation_kcat = 7342.467;
  transcription_elongation_k1 = 5.009;
  IkBa_translation_Km = 0.2386801;

  // Assignment rules:
  IkBa_phosphorylation_kcat := complex_phosphorylation_kcat*0.9;
  IkBa_phosphorylation_Vmax := IkBa_phosphorylation_kcat*IKKb_p;
  IkBa_shuttle_k2 := IkBa_shuttle_k1/2;
  complex_association_k2 := 0.003*complex_association_k1;
  IkBa_mRNA_degradation_n_k1 := IkBa_mRNA_degradation_c_k1*0.1;
  complex_shuttle_k2 := complex_shuttle_k1/10;
  p65_shuttle_k2 := p65_shuttle_k1/50;
  complex_phosphorylation_Vmax := complex_phosphorylation_kcat*IKKb_p;

  // Reactions:
  p65_shuttle: p65_cytoplasm -> p65_nucleus; p65_shuttle_k1*p65_cytoplasm - p65_shuttle_k2*p65_nucleus;
  IkBa_transcription_initiation: => IkBa_mRNA_1; nucleus*activated_Transcription__1___1__1(IkBa_transcription_kA, IkBa_transcription_k_basal, p65_nucleus);  // modifiers: p65_nucleus
  IkBap_degradation: IkBa_p => ; cytoplasm*IkBa_p_degradation_k1*IkBa_p;
  complex_phosphorylation: p65_IkB_cytoplasm => p65_cytoplasm + IkBa_p; cytoplasm*Henri_Michaelis_Menten__irreversible__1(complex_phosphorylation_Vmax, complex_phosphorylation_kM, p65_IkB_cytoplasm);
  dephosphorylation_IKK: IKKb_p => IKKb; cytoplasm*IKKb_dephosphorylation_k1*IKKb_p;
  complex_formation_n: p65_nucleus + IkBa_nucleus -> p65_IkB_nucleus; nucleus*(complex_association_k1*p65_nucleus*IkBa_nucleus - complex_association_k2*p65_IkB_nucleus);
  IkBa_degradation_n: IkBa_nucleus => ; nucleus*IkBa_degradation_k*IkBa_nucleus;
  TNFa_degradation: TNFa => ; cytoplasm*TNFa_degradation_k1*TNFa;
  IkBa_translation: IkBa_mRNA_cytoplasm => IkBa_mRNA_cytoplasm + IkBa_cytoplasm; cytoplasm*Henri_Michaelis_Menten__irreversible__2(IkBa_mRNA_cytoplasm, IkBa_translation_Km, IkBa_translation_vmax);
  IkBa_shuttle: IkBa_cytoplasm -> IkBa_nucleus; IkBa_shuttle_k1*IkBa_cytoplasm - IkBa_shuttle_k2*IkBa_nucleus;
  IkBa_mRNA_degradation_c: IkBa_mRNA_cytoplasm => ; cytoplasm*IkBa_mRNA_degradation_c_k1*IkBa_mRNA_cytoplasm;
  IkBa_degradation_c: IkBa_cytoplasm => ; cytoplasm*IkBa_degradation_k*IkBa_cytoplasm;
  IkBa_phosphorylation: IkBa_cytoplasm => IkBa_p; cytoplasm*Henri_Michaelis_Menten__irreversible__3(IkBa_cytoplasm, IkBa_phosphorylation_Vmax, IkBa_phosphorylation_kM);
  complex_shuttle: p65_IkB_nucleus -> p65_IkB_cytoplasm; complex_shuttle_k1*p65_IkB_nucleus - complex_shuttle_k2*p65_IkB_cytoplasm;
  IkBa_mRNA_degradation_n: IkBa_mRNA_nucleus => ; nucleus*IkBa_mRNA_degradation_n_k1*IkBa_mRNA_nucleus;
  IkBa_mRNA_transport: IkBa_mRNA_nucleus => IkBa_mRNA_cytoplasm; IkBa_mRNA_transport_k1*IkBa_mRNA_nucleus;
  complex_formation_c: p65_cytoplasm + IkBa_cytoplasm -> p65_IkB_cytoplasm; cytoplasm*(complex_association_k1*p65_cytoplasm*IkBa_cytoplasm - complex_association_k2*p65_IkB_cytoplasm);
  IkBa_transcription_elongation_1: IkBa_mRNA_1 => IkBa_mRNA_2; nucleus*transcription_elongation_k1*IkBa_mRNA_1;
  IkBa_transcription_elongation_2: IkBa_mRNA_2 => IkBa_mRNA_nucleus; nucleus*transcription_elongation_k1*IkBa_mRNA_2;
  IKK_active_phosphorylation: IKKb => IKKb_p; cytoplasm*Catalytic_activation__irrev__1(IKKb, IKKb_active_phosphorylation_Km, IKKb_active_phosphorylation_Vmax, IKKb_active_phosphorylation_kA, TNFa);  // modifiers: TNFa
  complex_degrdation_IkBa_n: p65_IkB_nucleus => p65_nucleus; nucleus*IkBa_degradation_k*p65_IkB_nucleus;
  complex_degradation_IkBa_c: p65_IkB_cytoplasm => p65_cytoplasm; cytoplasm*IkBa_degradation_k*p65_IkB_cytoplasm;
  basal_IKKb_phosphorylation: IKKb => IKKb_p; cytoplasm*IKKb_basal_phosphorylation_k1*IKKb;

  // Unit definitions:
  unit volume = 1e-6 litre;
  unit time = 3600 second;
  unit substance = 1e-12 mole;
  unit area = metre^2;
  unit length = metre;
end
