// SBML level 2 version 4

model New_Model()

  // Compartments:
  compartment c1 = 10;
  compartment c2 = 1;
  compartment c3 = 0.2;

  // Species:
  species $A_c1 in c1 = 1;
  species A_c2 in c2 = 0;
  species A_c3 in c3 = 0;
  species B_c3 in c3 = 0;
  species B_c2 in c2 = 0;
  species B_c1 in c1 = 0;

  // Reactions:
  A_uptake: $A_c1 => A_c2; A_uptake_k1*A_c1;
    A_uptake_k1 = 0.1;
  A_transport: A_c2 -> A_c3; A_transport_k1*A_c2 - k2*A_c3;
    A_transport_k1 = 0.1; k2 = 0.1;
  A_B_conversion: A_c3 => B_c3; c3*A_B_conversion_k1*A_c3;
    A_B_conversion_k1 = 0.3;
  B_transport: B_c3 => B_c2; B_transport_k1*B_c3;
    B_transport_k1 = 0.1;
  B_excretion: B_c2 => B_c1; B_excretion_k1*B_c2;
    B_excretion_k1 = 0.2;

  // Unit definitions:
  unit volume = 1e-3 litre;
  unit substance = 1e-3 mole;
end
