// SBML level 2 version 4

function Henri_Michaelis_Menten__irreversible(substrate, Km, V)
  V*substrate/(Km + substrate);
end
Henri_Michaelis_Menten__irreversible is "Henri-Michaelis-Menten (irreversible)";

model New_Model()

  // Compartments:
  compartment cyt = 3.7e-9;
  compartment nuc = 8e-10;
  compartment org = 3.6e-11;
  compartment ext = 1;

  // Species:
  species A in nuc = 2;
  species B in cyt = 0;
  species C in cyt = 0.01;
  species D in cyt = 0.01;
  species $Dext in ext = 0;

  // Reactions:
  trans: A => B; Henri_Michaelis_Menten__irreversible(A, Km, V);
    Km = 0.3411693; V = 5.035006e-11;
  conv: B => C; conv_k1*B;
    conv_k1 = 1.733924e-10;
  degrad: C -> D; cyt*(degrad_k1*C - k2*D); degrad is "conv2";
    degrad_k1 = 0.0414954; k2 = 0.007014553;
  ex: D => $Dext; ex_k1*D;
    ex_k1 = 9.817479e-11;

  // Unit definitions:
  unit substance = 1e-6 mole;
  unit length = 0.01 metre;
  unit area = metre^2;
  unit volume = 1e-3 litre;
  unit time = second;
end
