// SBML level 3 version 2

model New_Model()
  // model units - substance: substance, time: unit_of_time, volume: unit_of_volume, area: area, length: unit_of_length, extent: substance

  // Compartments:
  compartment c1 = 10;
  compartment c2 = 1;
  compartment c3 = 0.2;

  // Species:
  species $A_c1 in c1 = 1;
  species A_c2 in c2 = 0;
  species A_c3 in c3 = 0;
  species B_c3 in c3 = 0;
  species B_c2 in c2 = 0;
  species B_c1 in c1 = 0;

  // Reactions:
  A_uptake: $A_c1 => A_c2; A_uptake_k1*A_c1;
    A_uptake_k1 = 0.1;
  A_transport: A_c2 -> A_c3; A_transport_k1*A_c2 - k2*A_c3;
    A_transport_k1 = 0.1; k2 = 0.1;
  A_B_conversion: A_c3 => B_c3; c3*A_B_conversion_k1*A_c3;
    A_B_conversion_k1 = 0.3;
  B_transport: B_c3 => B_c2; B_transport_k1*B_c3;
    B_transport_k1 = 0.1;
  B_excretion: B_c2 => B_c1; B_excretion_k1*B_c2;
    B_excretion_k1 = 0.2;

  // Unit definitions:
  unit area = metre^2; area is "metre squared";
  unit substance = mole; substance is "mole";
  unit unit_of_time = second; unit_of_time is "second";
  unit unit_of_length = metre; unit_of_length is "metre";
  unit unit_of_volume = metre^3; unit_of_volume is "metre cubed";
end
